*Heading
** Job name: A-1-c Model name: G1- A:regular
** Generated by: Abaqus/CAE 2022
*Preprint, echo=NO, model=NO, history=NO, contact=NO
**
** PARTS
**
*Part, name=Lattice
*End Part
**
**
** ASSEMBLY
**
*Assembly, name=Assembly
**
*Instance, name=Lattice-1, part=Lattice
*Node
      1,           0.,          4.5
      2,  0.200000003,          4.5
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*Element, type=CPS4R
   1, 51992, 51986, 17093,   853
   2, 51986, 51987, 17094, 17093
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*Nset, nset=_PickedSet2, internal, generate
     1,  51993,      1
*Elset, elset=_PickedSet2, internal, generate
     1,  44095,      1
** Region: (Section-1:Picked), (Controls:Default)
*Elset, elset=_I1, internal
     1,     2,     3,     4,     5,     6
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** Section: Section-1
*Solid Section, elset=_I1, material=Material-1
,
** Region: (Section-1:Picked), (Controls:EC-1)
*Elset, elset=_I2, internal
  1037,  1038,  1039,  1040,  1041,  1042
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** Section: Section-1
*Solid Section, elset=_I2, controls=EC-1, material=Material-1
,
*End Instance
**
*Nset, nset=BottomEdge, instance=Lattice-1
   499,   500,   503,   504,   546,   547
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*Elset, elset=BottomEdge, instance=Lattice-1
 36801, 36802, 36803, 36804, 36805, 36806
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*Nset, nset=TopEdge, instance=Lattice-1
   19,   20,   23,   24,   27,   28
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*Elset, elset=TopEdge, instance=Lattice-1
 1037, 1038, 1039, 1040, 1041, 1042
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*Nset, nset=TopNodes, instance=Lattice-1
 19, 20, 23, 24, 27, 28
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*Nset, nset=U2, instance=Lattice-1
 56,
*End Assembly
**
** ELEMENT CONTROLS
**
*Section Controls, name=EC-1, ELEMENT DELETION=YES
1., 1., 1.
*Amplitude, name=Smooth, definition=SMOOTH STEP
             0.,              0.,              1.,              1.
**
** MATERIALS
**
*Material, name=Material-1
*Damage Initiation, criterion=DUCTILE
 0.01,0.,0.
*Damage Evolution, type=DISPLACEMENT
 0.01,
*Density
 7.8e-06,
*Elastic
200., 0.3
*Plastic
  5.,0.
 5.1,1.
**
** BOUNDARY CONDITIONS
**
** Name: Encastre Type: Symmetry/Antisymmetry/Encastre
*Boundary
BottomEdge, ENCASTRE
** ----------------------------------------------------------------
**
** STEP: Step-1
**
*Step, name=Step-1, nlgeom=YES, inc=100000000
*Dynamic,application=QUASI-STATIC,nohaf
0.01,1.,1e-12
**
** BOUNDARY CONDITIONS
**
** Name: Load Type: Displacement/Rotation
*Boundary, amplitude=Smooth
TopEdge, 1, 1
TopEdge, 2, 2, 0.16
TopEdge, 6, 6
**
** OUTPUT REQUESTS
**
*Restart, write, frequency=0
**
** FIELD OUTPUT: Defaults
**
*Output, field, number interval=50
*Node Output
A, RF, U, V
*Element Output, directions=YES
DMICRT, LE, PE, PEEQ, PEMAG, S, SDEG, STATUS
*Contact Output
CDISP, CSTRESS
**
** HISTORY OUTPUT: Energy
**
*Output, history, number interval=50
*Energy Output
ALLIE, ALLKE
**
** HISTORY OUTPUT: RF
**
*Node Output, nset=TopNodes
RF2,
**
** HISTORY OUTPUT: U2
**
*Node Output, nset=U2
U2,
*End Step
