*Heading
** Job name: 8x8 Model name: 8x8
** Generated by: Abaqus/CAE 2022
*Preprint, echo=NO, model=NO, history=NO, contact=NO
**
** PARTS
**
*Part, name=Part-3
*End Part
**
**
** ASSEMBLY
**
*Assembly, name=Assembly
**
*Instance, name=Part-3-1, part=Part-3
*Node
      1,   8.19999981,           9.
      2,           8.,           9.
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*Element, type=CPS4R
  1,     1,   519, 16862,   610
  2,   519,   520, 16863, 16862
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*Nset, nset=_PickedSet2_#14, internal, generate
     1,  54836,      1
*Elset, elset=_PickedSet2_#14, internal, generate
     1,  47192,      1
** Section: Section-1
*Solid Section, elset=_PickedSet2_#14, controls=EC-1, material=Material-1
,
*End Instance
**
*Nset, nset=BottomEdge, instance=Part-3-1
   178,   179,   185,   186,   240,   241
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*Elset, elset=BottomEdge, instance=Part-3-1
 14897, 14898, 14899, 14900, 14901, 14902
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*Nset, nset=TopEdge, instance=Part-3-1
     1,     2,     5,     6,    63,    64
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*Elset, elset=TopEdge, instance=Part-3-1
     1,     2,     3,     4,     5,     6
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*Nset, nset=TopNodes, instance=Part-3-1
   1,   2,   5,   6,  63,  64
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*Nset, nset=U2, instance=Part-3-1
 320,
*End Assembly
**
** ELEMENT CONTROLS
**
*Section Controls, name=EC-1, ELEMENT DELETION=YES
1., 1., 1.
*Amplitude, name=Smooth, definition=SMOOTH STEP
             0.,              0.,              1.,              1.
**
** MATERIALS
**
*Material, name=Material-1
*Damage Initiation, criterion=DUCTILE
 0.01,0.,0.
*Damage Evolution, type=DISPLACEMENT
 0.01,
*Density
 7.8e-06,
*Elastic
200., 0.3
*Plastic
  5.,0.
 5.1,1.
**
** BOUNDARY CONDITIONS
**
** Name: Encastre Type: Symmetry/Antisymmetry/Encastre
*Boundary
BottomEdge, ENCASTRE
** ----------------------------------------------------------------
**
** STEP: Step-1
**
*Step, name=Step-1, nlgeom=YES, inc=100000000, unsymm=YES
*Dynamic,application=QUASI-STATIC,nohaf
1.,1.,1e-15
**
** BOUNDARY CONDITIONS
**
** Name: Load Type: Displacement/Rotation
*Boundary, amplitude=Smooth
TopEdge, 1, 1
TopEdge, 2, 2, 0.235
TopEdge, 6, 6
**
** OUTPUT REQUESTS
**
*Restart, write, frequency=0
**
** FIELD OUTPUT: Defaults
**
*Output, field, number interval=50
*Node Output
A, RF, U, V
*Element Output, directions=YES
DMICRT, LE, PE, PEEQ, PEMAG, S, SDEG, STATUS
*Contact Output
CDISP, CSTRESS
**
** HISTORY OUTPUT: Energy
**
*Output, history, number interval=50
*Energy Output
ALLIE, ALLKE
**
** HISTORY OUTPUT: RF
**
*Node Output, nset=TopNodes
RF2,
**
** HISTORY OUTPUT: U2
**
*Node Output, nset=U2
U2,
*End Step
